# Group 3 Work 1
# Task 1
Ap := [
    0.023406, 3.13405, 0.001111, -3.09343;
    -3.12222, 5.33335, 1.11222, 2.22396;
    0.003459, 5.66789, -2.55561, 0.111112;
    0.330000, -1.126781, 2.267101, 3.334512
]
Wm := [
    1.0*10^-8, 1.0*10^-6, 1.0*10^-8, 1.0*10^-7;
    1.0*10^-7, 1.0*10^-7, 1.0*10^-6, 1.0*10^-9;
    1.0*10^-6, 1.0*10^-8, 1.0*10^-7, 1.0*10^-6;
    1.0*10^-8, 1.0*10^-6, 1.0*10^-6, 1.0*10^-7
]
m := 4
I(n, k) :=
    for i ∈ 0 .. n - 1
        for j ∈ 0 .. n - 1
            m[i, j] ← 1 if i == j
            m[i, j] ← 0 otherwise
            m[k, k] ← 0
    m
Tm(n, k, l) :=
    for i ∈ 0 .. n - 1
        for j ∈ 0 .. n - 1
            m[i, l] ← 1 if i == k
            m[i, j] ← 0 otherwise
    m
AA(m, s, f) := ||I(m, s)*Ap*I(m, f) + Tm(m, s, f)||
sum(sum(AA(m, u, f)*Wm[u, f], u = 0 .. m - 1), f = 0 .. m - 1) = 0.000202494
delta := 0.0002025
det([
    0.023406, 3.13405, 0.001111, -3.09343;
    -3.12222, 5.33335, 1.11222, 2.22396;
    0.003459, 5.66789, -2.55561, 0.111112;
    0.330000, -1.126781, 2.267101, 3.334512
]) = -209.8
det := -209.8
# далее оба выражения должны быть не равны 0
det - delta = -209.8
det + delta = -209.8
