# Group 3 Work 1
# Task 2
Ax := [10, 3; 0.333333, 0.11]
bx := [0.1; -3.00012]
# Определитель Ax должен быть не равен нулю
det([10.00000000, 3.00000000; 0.33333333, 0.11000000]) = 0.1
epsilon := 1/1000000
# Оценка погрешности:
|Ax + epsilon| - |Ax| = 6.77667e-6
delta := 6.777*10^-6
# Оценка обусловленности:
# Верхняя оценка для нормы A:
max(sum(|Ax[i, 0] + epsilon|, i = 0 .. 1), sum(|Ax[i, 1] + epsilon|, i = 0 .. 1)) = 10.3333
upperBound := 10.333
# Нижняя оценка для нормы А:
max(sum(|Ax[i, 0] - epsilon|, i = 0 .. 1), sum(|Ax[i, 1] - epsilon|, i = 0 .. 1)) = 10.3333
lowerBound := 10.333
# Обратную матрицу можно и не считать))
[10.00000000, 3.00000000; 0.33333333, 0.11000000]^-1 = [1.1, -30; -3.33333, 100]
# Расписанные нормы для верхней и нижней оценки А в -1:
1/|det([10.00000000, 3.00000000; 0.33333333, 0.11000000]) - delta|*max(sum(|Ax[1, j] + epsilon|, j = 0 .. 1), sum(|Ax[0, j] + epsilon|, j = 0 .. 1)) = 130.009
upperBoundInv := 130.009
1/|det([10.00000000, 3.00000000; 0.33333333, 0.11000000]) + delta|*max(sum(|Ax[1, j] - epsilon|, j = 0 .. 1), sum(|Ax[0, j] - epsilon|, j = 0 .. 1)) = 129.991
lowerBoundInv := 129.991
condA := upperBound*upperBoundInv = 1343.38
# Так как это значение больше 1 , то имеем плохую обусловленность
# Оценка относительной погрешности:
deltaA := epsilon*2 = 2e-6
Qa := deltaA/upperBound = 1.93555e-7
# Найдем норму b , нужна для общей формулы или не нужна, пусть будет
normB := sum(|bx[i] + epsilon|, i = 0 .. 1) = 3.10012
# Окончательная оценка относительной ошибки решения системы:
Qx := upperBoundInv*upperBound*(Qa + Qa) = 0.000520036
# Решим само матричное уравнение Ax * x = bx:
# Выше мы проверили, что обратная матрица для Ах существует , тогда найдем х
# по формуле :
x := Ax^-1*bx
x = [90.1127; -300.342]
# Лаба выполнена , мои поздравления , сэр))
