# Task 2_1_1
Nv := 3
C(i) := i/(3*(i + 1)*Nv)
A(i) := i/(2*(i + 1)*Nv)
B(i) := (i + 2 + Nv)/(i + 1 + Nv)
C(1) = 0.0555556
A(2) = 0.111111
B(1) = 1.2
A(3) = 0.125
C(2) = 0.0740741
B(2) = 1.16667
B(3) = 1.14286
D(i) := (-1)^i*i/Nv
D(1) = -0.333333
D(2) = 0.666667
D(3) = -1
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Dvector := [D(1); D(2); D(3)] = [-0.333333; 0.666667; -1]
Amatrix := [B(1), C(1), 0; A(2), B(2), C(2); 0, A(3), B(3)] = [1.2, 0.0555556, 0; 0.111111, 1.16667, 0.0740741; 0, 0.125, 1.14286]
# Прямой ход.
γ1 := B(1) = 1.2
α1 := -C(1)/γ1 = -0.0462963
β1 := D(1)/γ1 = -0.277778
γ2 := B(2) + A(2)*α1 = 1.16152
α2 := -C(2)/γ2 = -0.0637733
β2 := (D(2) - A(2)*β1)/γ2 = 0.600531
γ3 := B(3) + A(3)*α2 = 1.13489
α3 := -C(3)/γ3 = -0.0734288
β3 := (D(3) - A(3)*β2)/γ3 = -0.947291
# Обратный ход.
Xp3 := β3 = -0.947291
Xp2 := α2*Xp3 + β2 = 0.660943
Xp1 := α1*Xp2 + β1 = -0.308377
# Получили приближенное решение.
# Найдем вектор невязки.
Rnev := [D(1) - B(1)*Xp1 - C(1)*Xp2; D(2) - A(2)*Xp1 - B(2)*Xp2 - C(2)*Xp3; D(3) - A(3)*Xp2 - B(3)*Xp3] = [-6.93889e-18; 2.77556e-17; 0]
# Task 2_1_2
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Nva := 3
n := 50
i := 1 .. n
ORIGIN := 1
B[i] := (i + 2 + Nva)/(i + 1 + Nva)
C[i] := i/(3*(i + 1)*Nva)
A[i] := i/(2*(i + 1)*Nva)
D[i] := (-1)^i*i/Nva
progonka(A, B, C, D) :=
    γ[1] ← B[1]
    β[1] ← D[1]/γ[1]
    α[1] ← -C[1]/γ[1]
    for i ∈ 2 .. n - 1
        γ[i] ← B[i] + A[i]*α[i - 1]
        α[i] ← -C[i]/γ[i]
        β[i] ← (D[i] - A[i]*β[i - 1])/γ[i]
    γ[n] ← B[n] + A[n]*α[n - 1]
    β[n] ← (D[n] - A[n]*β[n - 1])/γ[n]
    x[n, 1] ← β[n]
    for i ∈ n - 1, n - 2 .. 1
        x[i, 1] ← α[i]*x[i + 1, 1] + β[i]
    for i ∈ n - 1, n - 2 .. 2
        x[i, 2] ← D[i] - B[i]*x[i, 1] - C[i]*x[i + 1, 1] - A[i]*x[i - 1, 1]
    x[n, 2] ← D[n] - B[n]*x[n, 1] - A[n]*x[n - 1, 1]
    x
progonka(A, B, C, D) float, 10 → [
    -0.3086931336, 0;
    0.6677716852, 0;
    -1.054364342, 0;
    1.458196301, 0;
    -1.87375042, 0;
    2.297710585, 0;
    -2.727931632, 0;
    3.162952692, 0;
    -3.601739889, 0;
    4.043538999, 0
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]
