# Task 2_2
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# Нужно ли ORIGIN=1 и TOL = 10 в -7
A := [
    0.77, 0.04, -0.21, 0.18;
    -0.45, 1.23, -0.06, 0.00;
    -0.26, -0.34, 1.11, 0.00;
    -0.05, 0.26, -0.34, 1.12
]
b := transpose([1.2400, -0.8800, -0.6200, -1.1700]) = [1.24; -0.88; -0.62; -1.17]
eps := 10^-7
n := 4
c :=
    for i ∈ 0 .. n - 1
        c[i] ← b[i]/A[i, i]
    c
    = [1.61039; -0.715447; -0.558559; -1.04464]
B :=
    for i ∈ 0 .. n - 1
        for j ∈ 0 .. n - 1
            B[i, j] ← -A[i, j]/A[i, i] if i ≠ j
            B[i, j] ← 0 otherwise
    B
    = [
        0, -0.0519481, 0.272727, -0.233766;
        0.365854, 0, 0.0487805, 0;
        0.234234, 0.306306, 0, 0;
        0.0446429, -0.232143, 0.303571, 0
    ]
norm1(B) = 0.644731
itera(A, n) :=
    for i ∈ 1 .. n
        α ← 1/A[i, i]
        for j ∈ 1 .. n
            B[i, j] ← -A[i, j]*α if i ≠ j
            B[i, j] ← 0 otherwise
    B
# В функции B=0 при i=j
Jakobi(B, c, n, eps) :=
    for i ∈ 0 .. n - 1
        x[i] ← 0
        x1[i] ← c[i]
    norm ← norm1(B)
    return norm if norm ≥ 1
    while norm > eps
        for i ∈ 0 .. n - 1
            x[i] ← c[i] + sum(B[i, j]*x1[i], j = 0 .. n - 1)
        norm ← sqrt(x1*x1)
        x1 ← x - x1
        norm ← sqrt(x1*x1)/norm
        x1 ← x
    x
# В фунцкции актуальны строки: n<---rows(A) и
# B <---utera(A,n)
z := Jakobi(B, c, n, eps)
z = [1.58974; -1.22222; -1.21569; -1.18182]
