# Task 3_1
NN := 3.0
CC := 2.7
BB := 0.1
X := [0.53; 1.1; 1.4; 2.57; CC; 2.8; 3.7; 4.5]
Y := [BB; 0.33; 1.0; 1.7; 0.0; 3.4; 4.1; NN]
# Сплайн интерполяция:
M := cspline(X, Y)
SP(t) := interp(M, X, Y, t)
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# Кусочно - постоянная интерполяция:
Kp(t) := linterp(X, Y, t)
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# Кубическая интерполяция:
n := length(X)
s(j) := if(j > 3, j - 4, j)
ni(t) := sum(if(t - X[i] > 0, 1, 0), i = 2 .. n - 3)
li := 1 .. 3
I(t, i, j) := product(t - X[i + s(j + li)], li)/product(X[i + s(j)] - X[i + s(j + li)], li)
it := 0 .. 3
P(t, i) := sum(Y[i + it]*I(t, i, it), it)
PL(t) := P(t, ni(t))
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# Производные интерполяций:
# Кусочно-постоянная:
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# Кубическая:
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# Сплайн:
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