# Task 3_2
NN := 3.0
CC := 2.7
BB := 0.1
x := [0.53; 1.1; 1.4; 2.57; CC; 2.8; 3.7; 4.5]
y := [BB; 0.33; 1.0; 1.7; 0.0; 3.4; 4.1; NN]
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P0 := [1; 2; 3]
V := expfit(x, y, P0)
V = [243510; 3.7562e-6; -243511]
a := V[0]
c := V[2]
b := V[1]
Y(t) := a*e^(b*t) + c
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N := length(x) - 1
i := 0 .. N
d[i] := |Y(x[i]) - y[i]|
d = [0.118145; 0.173221; 0.222376; 0.147802; 1.96671; 1.34182; 1.2186; 0.613147]
S := sqrt(sum((Y(x[i]) - y[i])^2/N, i = 0 .. N))
max(d) = 1.96671
S = 1.04503
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P0 := [1; 2; 3]
V := logfit(x, y, P0)
V = [43.933; 45.5836; -168.351]
a := V[0]
b := V[1]
c := V[2]
Y(t) := ln(t + a)*b
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N := length(x) - 1
i := 0 .. N
d[i] := |Y(x[i]) - y[i]|
d = [172.874; 173.225; 172.857; 173.319; 175.146; 171.844; 172.013; 173.873]
S := sqrt(sum((Y(x[i]) - y[i])^2/N, i = 0 .. N))
max(d) = 175.146
S = 185.102
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P0 := [1; 2; 3]
V := sinfit(x, y, P0)
V = [1.61392; 3.68563; 1.84376]
a := V[0]
b := V[1]
c := V[2]
Y(t) := b*sin(t) + a
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N := length(x) - 1
d[i] := |Y(x[i]) - y[i]|
d = [3.37713; 4.56859; 4.24593; 1.90775; 3.18909; 0.551436; 4.43886; 4.9889]
S := sqrt(sum((Y(x[i]) - y[i])^2/N, i = 0 .. N))
max(d) = 4.9889
S = 3.94627
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P0 := [1; 2; 3]
V := pwrfit(x, y, P0)
V = [0.866317; 1.03033; -0.452661]
a := V[0]
b := V[1]
c := V[2]
Y(t) := a*t^(t*b) + c
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N := length(x) - 1
d[i] := |Y(x[i]) - y[i]|
d = [0.0598443; 0.182478; 0.0451179; 8.39516; 13.2779; 13.04; 122.445; 921.884]
S := sqrt(sum((Y(x[i]) - y[i])^2/N, i = 0 .. N))
max(d) = 921.884
S = 351.584
s1 := regress(x, y, 1)
s2 := regress(x, y, 2)
s3 := regress(x, y, 3)
f1(t) := interp(s1, x, y, t)
f2(t) := interp(s2, x, y, t)
f3(t) := interp(s3, x, y, t)
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D1 := sum((f1(x[i]) - y[i])^2, i)
D2 := sum((f2(x[i]) - y[i])^2, i)
D3 := sum((f3(x[i]) - y[i])^2, i)
D1 = 7.64464
D2 = 7.64074
D3 = 6.93857
