Given  # Task 4_1
d^2/dt^2(y(t)) + 0.2*(d/dt(y(t))) + y(t) == sin(t)
y(0) == 1
y'(0) == 0
y := Odesolve(t, 4*π)
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eulerS(h, a, b) :=
    ptr ← a
    y0 ← 1
    z0 ← 0
    idx ← 0
    while ptr < b
        y1 ← y0 + h*z0
        z1 ← z0 + h*(-0.2*z0 - y0 + sin(ptr))
        res[idx] ← y1
        z0 ← z1
        y0 ← y1
        ptr ← ptr + h
        idx ← idx + 1
    res
h3 := 0.001
h2 := 0.1
h := 0.01
k := 1 .. round(4*π/h3)
j := 1 .. round(4*π/h2)
i := 1 .. round(4*π/h)
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j := 1 .. floor(4*π/h2)
i := 1 .. floor(4*π/h)
er[i] := |y(i*h) - eulerS(h, 0, 4*π)[i - 1]|
ers[j] := |y(j*h2) - eulerS(h2, 0, 4*π)[j - 1]|
ers = [
    0; 0.00479705; 0.00835581; 0.0105897; 0.0114499; 0.0109247; 0.0090384; 0.00585048; 0.00145333; 0.00403068
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]
rers[j] := |(y(j*h2) - eulerS(h2, 0, 4*π)[j - 1])/y(j*h2)|
rer[i] := |(y(i*h) - eulerS(h, 0, 4*π)[i - 1])/y(i*h)|
rer =  # no stored result
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