Given  # Task 4_2
d^2/dt^2(y(t)) + 0.2*(d/dt(y(t))) + y(t) + y(t)*y(t)*y(t) == sin(t)
y(0) == 1
y'(0) == 0
y := Odesolve(t, 4*π)
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eulerS(h, a, b) :=
    ptr ← a
    y0 ← 1
    z0 ← 0
    idx ← 0
    while ptr < b
        y1 ← y0 + h*z0
        z1 ← z0 + h*(-0.2*z0 - y0 - y0*y0*y0 + sin(ptr))
        res[idx] ← y1
        z0 ← z1
        y0 ← y1
        ptr ← ptr + h
        idx ← idx + 1
    res
h := 0.1
h2 := 0.01
i := 1 .. round(4*π/h)
j := 1 .. round(4*π/h2)
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h3 := 0.001
k := 1 .. round(4*π/h3)
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