n[1] := 10  # Task 6
h := 0.1
τ := 0.005
n1 := round(1/h) = 10
n2 := round(0.015/τ) = 3
j := 0 .. n2
i := 1 .. n1
x[i] := 0 + h*i
t[j] := 0 + τ*j
# [component: outputs sol]
u[i, 0] := 1
u[0, j] := 0
u[n1, j] := 0
t = [0; 0.005; 0.01; 0.015]
Given
i := 1 .. n1
j := 0 .. n2
x = [0; 0.1; 0.2; 0.3; 0.4; 0.5; 0.6; 0.7; 0.8; 0.9; 1]
((u[i, j + 1] - u[i, j])/τ) == ((u[i + 1, j] - 2*u[i, j] + u[i - 1, j])/h^2)
u[0, j] := 0
u[n1, j] := 0
((u[i, j + 1] - u[i, j])/τ) == ((u[i + 1, j] - 2*u[i, j] + u[i - 1, j])/h^2) solve, u →  # error: Решение не было найдено.
u[i, 0] := 1
Find(u[1, 1]) =  # error: Что-то не так с блоком решения, который используется для определения этой функции.
sol := [0; 181; -99; 1; 1; 1; 1; 1; -99; 181; 0]
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sol = [0; 181; -99; 1; 1; 1; 1; 1; -99; 181; 0]
